## To investigate the correlation of a given weight with the sum of  weights
# Programming language is Mathcad
ORIGIN := 1  # Origin for vectors and matrices
## Theory
Theory(k) := 1/sqrt(k)  # This is the function that theory suggests applies.
## Define various functions
## Define function to calculate weight for k trials in  a meta-analysis where all trials are of equal size n
Weight(k, n) :=
    for i ∈ 1 .. k
        X ← rnorm(n, 0, 1)
        Vmean[i] ← Var(X)/n
        Weight[i] ← 1/Vmean[i]
    Weight
# Values for n patients in trial i
#
# Variance of the mean for trial i
#
# Weight for trial i
#
# Return weights
## Define function to calculate correlation over m simulations
# m is the number of simulations
corrW(k, n, m) :=
    for j ∈ 1 .. m
        W ← Weight(k, n)
        T ← sum(W[i], i = 1 .. k)
        Y_1[j] ← W[1]
        Y_2[j] ← T
    rho ← corr(Y_1, Y_2)
# Begin simulation loop
#
# Calculate k weights
#
# Sum the weights
#
# Assign the first of the k weights to value j of vector Y_1
# Assign the total of the weights to value j of the vector Y_2 for totals of the k trials
# Return correlation over the m simulated ocasions
## Function to carry out 1 to k such correlations
Rho(k, n, m) :=
    for i ∈ 1 .. k
        Rho[i] ← corrW(i, n, m)
    Rho
## Plot results
## Set parameter values
# set values for k
k := 1 .. 20
# set value for m
m := 20000
# set value for n
n := 10
# degrees of freedom
ν := n - 1
ν = 9
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# set value for n
n := 20
m := 10000
# degrees of freedom
ν := n - 1
ν = 19
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